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/batch
! ANSYS input file written by Workbench version 2020 R2
! File used for geometry attach: C:\Users\shohei\Downloads\fem-izumi\5-5\beam1_files\dp0\SYS-2\DM\SYS-2.agdb
/title,beam1--Static Structural (C5)
/com,--- Data in consistent NMM units. See Solving Units in the help system for more information.
/units,MPA
/prep7
! Turn off shape checking because checks already performed inside WB mesher.
! See help system for more information.
SHPP,OFF,,NOWARN
etcon,set             ! allow ANSYS to choose best KEYOP's for 180x elements
/com,*********** Nodes for the whole assembly ***********
nblock,3,,7532
(1i9,3e20.9e3)
        1     9.500000000E+00    -1.800000000E+01     5.000000000E+00
        2     9.500000000E+00    -1.337500000E+01     5.000000000E+00
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-1
/com,*********** Nodes for all Remote Points ***********
nblock,3
(1i9,3e20.9e3)
    15514     0.000000000E+00    -1.899999939E+01     0.000000000E+00
    15515     0.000000000E+00    -1.899999939E+01     5.000000000E+02
-1
/com,*********** Elements for Body 1 "Solid" ***********
et,1,186
keyo,1,2,1          ! set full integration on SOLID186
eblock,19,solid,,900
(19i9)
        1        1        1        1        0        0        0        0       20        0        1      792     1811     1813     1965      793     1799     1800     1640
     4502     6641     6643     4503     4507     6625     6307     4506     4501     6626     6627     6308
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-1
/com,*********** Send User Defined Coordinate System(s) ***********
csys,0
toffst,273.15,  ! Temperature offset from absolute zero
/com,*********** Set Reference Temperature ***********
tref,22.
/com,*********** Send Materials ***********
MP,EX,1,205000,	! tonne s^-2 mm^-1
MP,NUXY,1,0.3,

!************************* Model Summary ********************
!Solid,	S45C,	matid,	1
!************************* End Model Summary ********************
/com,*********** Define Force Using Surface Effect Elements ***********
local,12,0,0.,0.,0.,0.,0.,0.
csys,0
et,2,156
keyop,2,5,1         !  No orientation node
eblock,10,,,1
(15i9)
    12405        2        2        2       12     1864     1791     6610
-1
esel,s,type,,2
keyop,2,2,1                ! Apply load in local coordinate system
keyop,2,7,1                ! Use original area so load is constant in large deformation
esel,all
/com,*********** Create Remote Point "Internal Remote Point" ***********
! -------- Remote Point Used by "Remote Displacement" --------
*set,tid,4
*set,cid,3
et,cid,174
et,tid,170
keyo,tid,2,1               ! Don't fix the pilot node
keyo,tid,4,111111
keyo,cid,12,5              ! Bonded Contact
keyo,cid,4,1               ! Deformable RBE3 style load
keyo,cid,2,2               ! MPC style contact
eblock,10,,,8
(15i9)
    12406        3        3        3        0     1863     2020     1591     1741     6694     6209     6208     6511
    12407        3        3        3        0     2020     2019     1590     1591     6848     6207     6206     6209
    12408        3        3        3        0     2019     2018     1589     1590     6847     6205     6204     6207
    12409        3        3        3        0     2018     2017     1588     1589     6846     6203     6202     6205
    12410        3        3        3        0     2017     2016     1587     1588     6845     6201     6200     6203
    12411        3        3        3        0     2016     2015     1586     1587     6844     6199     6198     6201
    12412        3        3        3        0     2015     2014     1585     1586     6843     6197     6195     6199
    12413        3        3        3        0     2014     1803     1802     1585     6632     6630     6196     6197
-1
*set,_npilot,15514
_npilot78=_npilot
type,tid
mat ,cid
real,cid
tshape,pilo
en,12414,_npilot
tshape
/com,*********** Create Remote Point "Internal Remote Point 2" ***********
! -------- Remote Point Used by "Remote Displacement 2" --------
*set,tid,6
*set,cid,5
et,cid,174
et,tid,170
keyo,tid,2,1               ! Don't fix the pilot node
keyo,tid,4,111111
keyo,cid,12,5              ! Bonded Contact
keyo,cid,4,1               ! Deformable RBE3 style load
keyo,cid,2,2               ! MPC style contact
eblock,10,,,8
(15i9)
    12415        5        5        5        0     1805     1793     1792     1812     6614     6611     6612     6635
    12416        5        5        5        0     1806     1794     1793     1805     6616     6613     6614     6634
    12417        5        5        5        0     1807     1795     1794     1806     6618     6615     6616     6636
    12418        5        5        5        0     1808     1796     1795     1807     6620     6617     6618     6637
    12419        5        5        5        0     1809     1797     1796     1808     6622     6619     6620     6638
    12420        5        5        5        0     1810     1798     1797     1809     6624     6621     6622     6639
    12421        5        5        5        0     1811     1799     1798     1810     6626     6623     6624     6640
    12422        5        5        5        0     1813     1800     1799     1811     6627     6625     6626     6641
-1
*set,_npilot,15515
_npilot81=_npilot
type,tid
mat ,cid
real,cid
tshape,pilo
en,12423,_npilot
tshape
/com,*********** Construct Remote Displacement ***********
/com,*********** Construct Remote Displacement ***********

/COM,*** Create a component for all remote displacements ***
CMBLOCK,REMOTEDISPALL,NODE,        2
(8i10)
     15514     15515

fini
/com,****************************************************************************
/com,*************************    SOLUTION       ********************************
/com,****************************************************************************
/solu
antype,0                   ! static analysis
_thickRatio=  0     ! Ratio of thick parts in the model
eqsl,sparse,,,,,1
cntr,print,1               ! print out contact info and also make no initial contact an error
dmpoption,emat,no             ! Don't combine emat file for DANSYS
dmpoption,esav,no             ! Don't combine esav file for DANSYS
nldiag,cont,iter           ! print out contact info each equilibrium iteration
rescontrol,,none                 ! Do not keep any restart files
/com,****************************************************
/com,******************* SOLVE FOR LS 1 OF 1 ****************
esel,s,type,,2
nsle
sfe,all,1,pres,1,0.
sfe,all,2,pres,1,-526.315789473684
sfe,all,3,pres,1,0.
nsel,all
esel,all
d,15514,ux,0.
d,15514,uy,0.
d,15514,uz,0.
d,15514,roty,0.
d,15514,rotz,0.
d,15515,ux,0.
d,15515,uy,0.
d,15515,uz,0.
nsub,1,1,1
time,1.
outres,erase
outres,all,none
outres,nsol,all,
outres,rsol,all
outres,eangl,all
outres,etmp,all
outres,veng,all
outres,strs,all,
outres,epel,all,
outres,eppl,all,
outres,cont,all,
! *********** WB SOLVE COMMAND ***********
! check interactive state
*get,ANSINTER_,active,,int
*if,ANSINTER_,ne,0,then
/eof
*endif
solve
/com *************** Write FE CONNECTORS *********
CEWRITE,file,ce,,INTE
/com,****************************************************
/com,*************** FINISHED SOLVE FOR LS 1 *************
/post1
fini
