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/batch
! ANSYS input file written by Workbench version 2020 R2
! File used for geometry attach: C:\Users\shohei\Downloads\fem-izumi\5-3-1\4 point bending trial #2_files\dp0\SYS\DM\SYS.agdb
/title,4 point bending trial #2--Static Structural (A5)
/com,--- Data in consistent NMM units. See Solving Units in the help system for more information.
/units,MPA
/prep7
! Turn off shape checking because checks already performed inside WB mesher.
! See help system for more information.
SHPP,OFF,,NOWARN
etcon,set             ! allow ANSYS to choose best KEYOP's for 180x elements
/com,*********** Nodes for the whole assembly ***********
nblock,3,,14256
(1i9,3e20.9e3)
        1    -6.420318907E+00     2.857487853E+01     0.000000000E+00
        2    -6.370807871E+00     2.820104306E+01     0.000000000E+00
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-1
/com,*********** Elements for Body 1 "Surface Body" ***********
et,1,183
keyo,1,3,3
eblock,19,solid,,4156
(19i9)
        1        1        1        1        0        0        0        0        8        0      391     1419     1207     2636     2636     6610     7513     2636     7514
        1        1        1        1        0        0        0        0        8        0      444     2609     1405     1672     1672     7666     7671     1672     7669
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-1
/com,*********** Send User Defined Coordinate System(s) ***********
csys,0
toffst,273.15,  ! Temperature offset from absolute zero
/com,*********** Set Reference Temperature ***********
tref,22.
/com,*********** Send Materials ***********
MP,EX,1,205000,	! tonne s^-2 mm^-1
MP,NUXY,1,0.28,

/com,*********** Send Sheet Properties ***********
r,1,1.

!************************* Model Summary ********************
!Surface Body,	S45C,	matid,	1
!************************* End Model Summary ********************
/com,*********** Fixed Supports ***********
CMBLOCK,_FIXEDSU,NODE,        1
(8i10)
      3884
cmsel,s,_FIXEDSU
d,all,all
nsel,all
/com,******* Constant Zero Displacement Y *******
CMBLOCK,_DISPZEROUY,NODE,        1
(8i10)
      3942
cmsel,s,_DISPZEROUY
d,all,uy,0
nsel,all
/com,*********** Define Force Using Surface Effect Elements ***********
local,12,0,0.,0.,0.,0.,0.,0.
csys,0
et,2,153
keyop,2,3,10        ! get plane stress option and thickness from underlying element
eblock,10,,,16
(15i9)
     4157        2        2        2       12     3843     3862    11866
     4158        2        2        2       12     3844     3843    11832
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-1
esel,s,type,,2
keyop,2,2,1                ! Apply load in local coordinate system
keyop,2,7,1                ! Use original area so load is constant in large deformation
keyop,2,11,2               ! Use real and not project area
esel,all
/com,*********** Define Force Using Surface Effect Elements ***********
local,13,0,0.,0.,0.,0.,0.,0.
csys,0
et,3,153
keyop,3,3,10        ! get plane stress option and thickness from underlying element
eblock,10,,,16
(15i9)
     4173        3        3        3       13     3899     3904    11963
     4174        3        3        3       13     3898     3899    11955
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-1
esel,s,type,,3
keyop,3,2,1                ! Apply load in local coordinate system
keyop,3,7,1                ! Use original area so load is constant in large deformation
keyop,3,11,2               ! Use real and not project area
esel,all
/com,*********** Define Vertex Force Using Follower Elements ***********
et,4,201
keyo,4,1,1           ! Keep the direction constant
keyo,4,2,1           ! Apply Forces only, not moment
mat,4
real,4
type,4
en,4189,4402
r,4
rmod,4,1,1.0,              ! FX
mat,5
real,5
type,4
en,4190,4402
r,5
rmod,5,2,1.0,              ! FY
/com,*********** Define Vertex Force Using Follower Elements ***********
et,7,201
keyo,7,1,1           ! Keep the direction constant
keyo,7,2,1           ! Apply Forces only, not moment
mat,7
real,7
type,7
en,4191,4400
r,7
rmod,7,1,1.0,              ! FX
mat,8
real,8
type,7
en,4192,4400
r,8
rmod,8,2,1.0,              ! FY
fini
/com,****************************************************************************
/com,*************************    SOLUTION       ********************************
/com,****************************************************************************
/solu
antype,0                   ! static analysis
_thickRatio=  0     ! Ratio of thick parts in the model
eqsl,sparse,,,,,1
cntr,print,1               ! print out contact info and also make no initial contact an error
dmpoption,emat,no             ! Don't combine emat file for DANSYS
dmpoption,esav,no             ! Don't combine esav file for DANSYS
nldiag,cont,iter           ! print out contact info each equilibrium iteration
rescontrol,,none                 ! Do not keep any restart files
/com,****************************************************
/com,******************* SOLVE FOR LS 1 OF 1 ****************
esel,s,type,,2
nsle
sfe,all,1,pres,1,-20.8333333333342
sfe,all,2,pres,1,0.
esel,s,type,,3
nsle
sfe,all,1,pres,1,20.8333333333342
sfe,all,2,pres,1,0.
nsel,all
esel,all
esel,s,real,,4
sfe,all,1,pres,1,0.
esel,s,real,,5
sfe,all,1,pres,1,-500.
esel,s,real,,7
sfe,all,1,pres,1,0.
esel,s,real,,8
sfe,all,1,pres,1,-500.
esel,all
nsub,1,1,1
time,1.
outres,erase
outres,all,none
outres,nsol,all,
outres,rsol,all
outres,eangl,all
outres,etmp,all
outres,veng,all
outres,strs,all,
outres,epel,all,
outres,eppl,all,
outres,cont,all,
! *********** WB SOLVE COMMAND ***********
! check interactive state
*get,ANSINTER_,active,,int
*if,ANSINTER_,ne,0,then
/eof
*endif
solve
/com *************** Write FE CONNECTORS *********
CEWRITE,file,ce,,INTE
/com,****************************************************
/com,*************** FINISHED SOLVE FOR LS 1 *************
/post1
fini
