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/batch
! ANSYS input file written by Workbench version 2020 R2
! File used for geometry attach: C:\Users\shohei\Downloads\fem-izumi\5-3-8\fitting pin_files\dp0\SYS\DM\SYS.agdb
/title,fitting pin--Static Structural (A5)
/com,--- Data in consistent NMM units. See Solving Units in the help system for more information.
/units,MPA
/prep7
! Turn off shape checking because checks already performed inside WB mesher.
! See help system for more information.
SHPP,OFF,,NOWARN
etcon,set             ! allow ANSYS to choose best KEYOP's for 180x elements
/com,*********** Nodes for the whole assembly ***********
nblock,3,,2906
(1i9,3e20.9e3)
        1     1.235120401E+01     4.290039724E+01     0.000000000E+00
        2     1.161988571E+01     5.142910889E+01     0.000000000E+00
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-1
/com,*********** Elements for Body 1 "Surface Body" ***********
et,1,183
keyo,1,3,3
eblock,19,solid,,821
(19i9)
        1        1        1        1        0        0        0        0        8        0      291       38      211      205      205     1098     1360      205     1097
        1        1        1        1        0        0        0        0        8        0        1      236      298      481      282     1439     1472     1468     1372
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-1
/com,*********** Send User Defined Coordinate System(s) ***********
csys,0
toffst,273.15,  ! Temperature offset from absolute zero
/com,*********** Set Reference Temperature ***********
tref,22.
/com,*********** Send Materials ***********
MP,EX,1,205000,	! tonne s^-2 mm^-1
MP,NUXY,1,0.28,

/com,*********** Send Sheet Properties ***********
r,1,10.

!************************* Model Summary ********************
!Surface Body,	S45C,	matid,	1
!************************* End Model Summary ********************
/com,*********** Send Named Selection as Node Component ***********
CMBLOCK,UPPER_SIDE,NODE,       49
(8i10)
       723       725       727       728       729       730       731       732
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/com,********* Frictionless Supports X *********
CMBLOCK,_FRICSUX,NODE,       94
(8i10)
       724       726       738       765       767       769       778       783
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cmsel,s,_FRICSUX
d,all,ux,0
nsel,all
/com,******* Constant Zero Displacement Y *******
CMBLOCK,_DISPZEROUY,NODE,       15
(8i10)
       831       832       833       834       835       836       837       867
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cmsel,s,_DISPZEROUY
d,all,uy,0
nsel,all
/com,********** Rotational Supports Z **********
CMBLOCK,_ROTSUZ ,NODE,       94
(8i10)
       724       726       738       765       767       769       778       783
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cmsel,s,_ROTSUZ
d,all,rotz,0
nsel,all
/com,*********** Define Pressure Using Surface Effect Elements ***********
et,2,153
keyop,2,3,10        ! get plane stress option and thickness from underlying element
eblock,10,,,24
(15i9)
      822        2        2        2        0      790      740     2546
      823        2        2        2        0      740      908     2545
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-1
esel,s,type,,2
keyop,2,7,0                ! Use deformed area for application of load
esel,all

*DIM,_loadvari50,TABLE,2,2,1,X,TIME
! Time Values
_loadvari50(0,1,1) = 0.
_loadvari50(0,2,1) = 1.
! X values
_loadvari50(1,0,1) = 0.
_loadvari50(2,0,1) = 15.
! Load values
_loadvari50(1,1,1) = 0.
_loadvari50(1,2,1) = 1.
_loadvari50(2,1,1) = 0.
_loadvari50(2,2,1) = 0.

esel,all
fini
/com,****************************************************************************
/com,*************************    SOLUTION       ********************************
/com,****************************************************************************
/solu
antype,0                   ! static analysis
_thickRatio=  0     ! Ratio of thick parts in the model
eqsl,sparse,,,,,1
cntr,print,1               ! print out contact info and also make no initial contact an error
dmpoption,emat,no             ! Don't combine emat file for DANSYS
dmpoption,esav,no             ! Don't combine esav file for DANSYS
nldiag,cont,iter           ! print out contact info each equilibrium iteration
rescontrol,,none                 ! Do not keep any restart files
/com,****************************************************
/com,******************* SOLVE FOR LS 1 OF 1 ****************
esel,s,type,,2
nsle
sf,all,pres,%_loadvari50%
nsel,all
esel,all
esel,all
nsub,1,1,1
time,1.
outres,erase
outres,all,none
outres,nsol,all,
outres,rsol,all
outres,eangl,all
outres,etmp,all
outres,veng,all
outres,strs,all,
outres,epel,all,
outres,eppl,all,
outres,cont,all,
! *********** WB SOLVE COMMAND ***********
! check interactive state
*get,ANSINTER_,active,,int
*if,ANSINTER_,ne,0,then
/eof
*endif
solve
/com *************** Write FE CONNECTORS *********
CEWRITE,file,ce,,INTE
/com,****************************************************
/com,*************** FINISHED SOLVE FOR LS 1 *************
/post1
fini
